// COMSOL Multiphysics 5.5.0.359 model "webinar.mph"
// Outline of the model tree

Parameters
  dispy = 0.0[mm]
  zeta = 16.93
  H = 129.24[MPa]
  sigmars = 715[MPa]
  sigmags = 450[MPa]
  epe = 0[mm]

Geometry
  geom1 "Geometry 1" (2D, length unit m)
    r1: Rectangle | size = {2, 10}
    fin: Finalize "Form Union"

Materials
  mat1: Common "Structural steel" on domains 1
    def "Basic"
      relpermeability = 1
      heatcapacity = 475[J/(kg*K)]
      thermalconductivity = 44.5[W/(m*K)]
      electricconductivity = 4.032e6[S/m]
      relpermittivity = 1
      thermalexpansioncoefficient = 12.3e-6[1/K]
      density = 7850[kg/m^3]
    Enu "Young's modulus and Poisson's ratio"
      youngsmodulus = 206.9[GPa]
      poissonsratio = 0.29
    ElastoplasticModel "Elastoplastic material model"
      sigmags = 450[MPa]
      sigmagh = sig_h(epe)
      Hillcoefficients = {0, 0, 0, 0, 0, 0}
      ys = {0, 0, 0, 0, 0, 0}
      an1: Analytic | funcname = sig_h; expr = H*epe+(sigmars-sigmags)*(1-exp(-zeta*epe)); args = epe; argunit = 1; fununit = Pa
    ArmstrongFrederick
      Ck = 129.24[MPa]

Physics
  solid: SolidMechanics on all domains
    dependent variable u = {u, v, w}
    lemm1: LinearElasticModel "Linear Elastic Material 1" (default) | SolidModel = Orthotropic
      plsty1: Plasticity on all domains
        IsotropicHardeningModel = UserDefinedIsotropicHardening
        sigmagh_mat = from_mat
        KinematicHardeningModel = ArmstrongFrederick
    free1: Free (default)
    init1: init "Initial Values 1" (default)
    disp1: Displacement1 "Prescribed Displacement Top" on boundaries 3
      Notation = StandardNotation
      Direction = {0, 1, 0}
      U0 = {0, -epe, 0}
    disp2: Displacement1 "Prescribed Displacement Bottom" on boundaries 2 | Direction = {0, 0, 0}; U0 = {0, epe, 0}

Mesh
  mesh1 "Mesh 1" (physics-controlled)

Studies
  std1 "Study 1"
    stat: Stationary | useparam = on; sweeptype = filled; pname = epe; plistarr = range(0,0.1,4); punit = mm

Solver configurations
  sol1 "Solution 1" (study std1)
    v1: Variables "Dependent Variables 1"
    s1: Stationary "Stationary Solver 1"
      dDef: Direct
      p1: Parametric | porder = constant
      fc1: FullyCoupled | linsolver = dDef

Datasets
  dset1: Solution | solution = sol1

Plots
  pg3: PlotGroup1D "1D Plot Group 3" | data = dset1
    ptgr1: PointGraph "Stress x Strain" on points 4
      expr = solid.sp1y
      descr = Principal stress direction 1, y component
      xdata = expr
  pg4: PlotGroup2D "2D Plot Group 4" | data = dset1
    surf1: Surface | data = dset1; expr = solid.sp1y; descr = Principal stress direction 1, y component